// SBML level 3 version 2
// Acetaminophen-Autism Neurodevelopmental BioModel
// Multi-compartment, multi-timescale systems biology model

model acetaminophen_autism_model()
  // Acetaminophen-Induced Neurodevelopmental Disruption

  // Compartments:
  compartment maternal_plasma; maternal_plasma is "Maternal Plasma";
  compartment placenta; placenta is "Placental Tissue";
  compartment fetal_brain; fetal_brain is "Fetal Brain";
  compartment fetal_plasma; fetal_plasma is "Fetal Circulation";
  compartment oligodendrocyte; oligodendrocyte is "Oligodendrocyte Lineage";

  // Species:
  species APAP_maternal in maternal_plasma; APAP_maternal is "Acetaminophen_Maternal";
  species APAP_placenta in placenta; APAP_placenta is "Acetaminophen_Placental";
  species APAP_fetal in fetal_brain; APAP_fetal is "Acetaminophen_Fetal";
  species NAPQI in fetal_brain; NAPQI is "N_acetyl_p_benzoquinone_imine";
  species Testosterone in fetal_plasma;
  species LH in fetal_plasma; LH is "Luteinizing_Hormone";
  species FSH in fetal_plasma; FSH is "Follicle_Stimulating_Hormone";
  species T_effective in fetal_brain; T_effective is "Bioavailable_Testosterone";
  species AromataseComplex in placenta; AromataseComplex is "Aromatase_APAP_Complex";
  species CYP2E1 in fetal_brain; CYP2E1 is "Cytochrome_P450_2E1";
  species CYP2E1_APAP in fetal_brain; CYP2E1_APAP is "CYP2E1_APAP_Complex";
  species Folate in fetal_brain;
  species SAM in fetal_brain; SAM is "S_Adenosyl_Methionine";
  species ROS in fetal_brain; ROS is "Reactive_Oxygen_Species";
  species GSH in fetal_brain; GSH is "Glutathione";
  species GSSG in fetal_brain; GSSG is "Glutathione_Disulfide";
  species OPC in oligodendrocyte; OPC is "Oligodendrocyte_Precursor_Cells";
  species OL_immature in oligodendrocyte; OL_immature is "Immature_Oligodendrocytes";
  species OL_mature in oligodendrocyte; OL_mature is "Mature_Oligodendrocytes";
  species MBP_mRNA in oligodendrocyte; MBP_mRNA is "Myelin_Basic_Protein_mRNA";
  species MBP_protein in oligodendrocyte; MBP_protein is "Myelin_Basic_Protein";
  species Myelin_sheath in fetal_brain; Myelin_sheath is "Myelin_Sheath_Formation";
  species DNMT1 in fetal_brain; DNMT1 is "DNA_Methyltransferase_1";
  species MBP_promoter in oligodendrocyte; MBP_promoter is "MBP_Promoter_Unmethylated";
  species MBP_promoter_meth in oligodendrocyte; MBP_promoter_meth is "MBP_Promoter_Methylated";
  species Intra_hemisphere_connectivity in fetal_brain; Intra_hemisphere_connectivity is "Within_Hemisphere_Connections";
  species Inter_hemisphere_connectivity in fetal_brain; Inter_hemisphere_connectivity is "Between_Hemisphere_Connections";
  species Corpus_callosum_volume in fetal_brain; Corpus_callosum_volume is "Corpus_Callosum_Volume";
  species gestational_week in fetal_plasma = 0; gestational_week is "Gestational_Week";
  species $F in fetal_brain; F is "Dominant_Oscillatory_Frequency_Hz";
  species $O_proxy in oligodendrocyte; O_proxy is "Myelination_Proxy";
  species APAP_placenta in placenta; APAP_placenta is "Acetaminophen_Placenta";
  species NAPQI_placenta in placenta; NAPQI_placenta is "NAPQI_Placenta";
  species NAPQI_adduct_placenta in placenta; NAPQI_adduct_placenta is "NAPQI_Protein_Adduct_Placenta";
  species NAPQI_adduct_fetal in fetal_brain; NAPQI_adduct_fetal is "NAPQI_Protein_Adduct_Fetal";
  species GSH_placenta in placenta = 10; GSH_placenta is "Glutathione_Placenta";
  species CYP2E1_placenta in placenta = 1; CYP2E1_placenta is "CYP2E1_Placenta";
  species PAP_fetal in fetal_brain; PAP_fetal is "p_Aminophenol_Fetal";
  species FAAH_fetal in fetal_brain = 1; FAAH_fetal is "FAAH_Fetal";
  species ArachidonicAcid_fetal in fetal_brain = 5; ArachidonicAcid_fetal is "Arachidonic_Acid_Fetal";
  species AM404_fetal in fetal_brain; AM404_fetal is "AM404_Fetal";

  // Parameters:
  k_placental_transfer = 0.95;
  k_fetal_clearance = 0.1;
  k_cyp2e1_activity = 0.3;
  critical_period_1 = 1;
  critical_period_2 = 1;
  critical_period_3 = 1;
  T_baseline = 450;
  androgen_disruption_rate = 0.7;
  masculinization_threshold = 200;
  opc_proliferation_rate = 0.5;
  ol_differentiation_rate = 0.3;
  mbp_transcription_rate = 1;
  myelination_efficiency = 0.8;
  methylation_rate = 0.2;
  demethylation_rate = 0.05;
  sam_folate_ratio = 2;
  ros_generation_rate = 0.4;
  antioxidant_capacity = 1;
  oxidative_damage_threshold = 2;
  w_intra = 0.4;
  w_inter = 0.4;
  w_cc = 0.2;
  s_intra = 1;
  s_inter = 1;
  s_cc = 1;
  F_base = 4.5;
  alpha_F = 1.2;
  beta_F = 6;
  w_OPC = 0.3;
  w_OLimm = 0.3;
  w_OLmature = 0.4;
  eps_ln = 1e-6;
  k_APAP_m2f = 0.95;
  k_APAP_f2m = 0.8;
  k_APAP_m2p = 0.5;
  k_APAP_p2m = 0.45;
  k_cyp2e1_placenta = 0.1;
  k_gsh_placenta = 0.2;
  k_adduct_placenta = 0.15;
  k_adduct_clear_placenta = 0.005;
  k_adduct_fetal = 0.2;
  k_adduct_clear_fetal = 0.002;
  k_deacetylation_fetal = 0.05;
  k_faah = 0.08;
  k_am404_clear = 0.01;

  // Assignment rules:
  Testosterone := 30 + 420*exp(-((gestational_week - 17)^2/(2*3^2)));
  LH := 10 + 60*exp(-((gestational_week - 15)^2/18));
  FSH := 5 + 35*exp(-((gestational_week - 15)^2/20));
  T_effective := Testosterone*(1 - 0.4*(APAP_fetal/(APAP_fetal + 10))*critical_period_1);
  O_proxy := w_OPC*OPC + w_OLimm*OL_immature + w_OLmature*OL_mature;
  C_index := w_intra*(Intra_hemisphere_connectivity/s_intra) + w_inter*(Inter_hemisphere_connectivity/s_inter) + w_cc*(Corpus_callosum_volume/s_cc);
  F := F_base + alpha_F*ln(O_proxy + eps_ln) + beta_F*C_index;

  // Rate rules:
  gestational_week' = 1/168;

  // Reactions:
  apap_m2f: APAP_maternal => APAP_fetal; k_APAP_m2f*APAP_maternal; apap_m2f is "APAP Maternal to Fetal";
  apap_f2m: APAP_fetal => APAP_maternal; k_APAP_f2m*APAP_fetal; apap_f2m is "APAP Fetal to Maternal";
  apap_m2p: APAP_maternal => APAP_placenta; k_APAP_m2p*APAP_maternal; apap_m2p is "APAP Maternal to Placenta";
  apap_p2m: APAP_placenta => APAP_maternal; k_APAP_p2m*APAP_placenta; apap_p2m is "APAP Placenta to Maternal";
  cyp2e1_metabolism: APAP_fetal + CYP2E1 => NAPQI + CYP2E1; k_cyp2e1_activity*APAP_fetal*CYP2E1; cyp2e1_metabolism is "CYP2E1-Mediated APAP Metabolism";
  cyp2e1_placenta: APAP_placenta + CYP2E1_placenta => NAPQI_placenta; k_cyp2e1_placenta*APAP_placenta*CYP2E1_placenta; cyp2e1_placenta is "Placental CYP2E1 APAP Metabolism";
  napqi_gsh_placenta: NAPQI_placenta + GSH_placenta => ; k_gsh_placenta*NAPQI_placenta*GSH_placenta; napqi_gsh_placenta is "Placental NAPQI GSH Conjugation";
  napqi_adduct_placenta: NAPQI_placenta => NAPQI_adduct_placenta; k_adduct_placenta*NAPQI_placenta; napqi_adduct_placenta is "Placental NAPQI Protein Adduct";
  adduct_clear_placenta: NAPQI_adduct_placenta => ; k_adduct_clear_placenta*NAPQI_adduct_placenta; adduct_clear_placenta is "Placental Adduct Clearance";
  napqi_adduct_fetal: NAPQI => NAPQI_adduct_fetal; k_adduct_fetal*NAPQI; napqi_adduct_fetal is "Fetal NAPQI Protein Adduct";
  adduct_clear_fetal: NAPQI_adduct_fetal => ; k_adduct_clear_fetal*NAPQI_adduct_fetal; adduct_clear_fetal is "Fetal Adduct Clearance";
  apap_deacetylation_fetal: APAP_fetal => PAP_fetal; k_deacetylation_fetal*APAP_fetal; apap_deacetylation_fetal is "Fetal Deacetylation to PAP";
  faah_am404: PAP_fetal + ArachidonicAcid_fetal + FAAH_fetal => AM404_fetal; k_faah*PAP_fetal*FAAH_fetal; faah_am404 is "FAAH-mediated AM404 Synthesis";
  am404_clear: AM404_fetal => ; k_am404_clear*AM404_fetal; am404_clear is "AM404 Clearance (slow)";
  testosterone_disruption: Testosterone => T_effective; Testosterone*(1 - androgen_disruption_rate*APAP_fetal*critical_period_1); testosterone_disruption is "APAP-Mediated Testosterone Disruption";
  ros_generation: NAPQI => ROS; ros_generation_rate*NAPQI; ros_generation is "NAPQI-Induced ROS Generation";
  folate_consumption: Folate => ; 0.3*Folate*APAP_fetal; folate_consumption is "APAP-Mediated Folate Depletion";
  opc_proliferation: OPC => 2 OPC; opc_proliferation_rate*OPC*(1 + 0.5*Folate)*(1 - 0.6*ROS); opc_proliferation is "OPC Proliferation";
  ol_differentiation: OPC => OL_immature; ol_differentiation_rate*OPC*T_effective; ol_differentiation is "Oligodendrocyte Differentiation";
  mbp_methylation: MBP_promoter + SAM -> MBP_promoter_meth; methylation_rate*MBP_promoter*SAM*(1 + 2*APAP_fetal); mbp_methylation is "MBP Promoter Methylation";
  mbp_transcription: MBP_promoter => MBP_mRNA; mbp_transcription_rate*MBP_promoter*T_effective; mbp_transcription is "MBP mRNA Synthesis";
  mbp_translation: MBP_mRNA => MBP_protein; 0.8*MBP_mRNA; mbp_translation is "MBP Protein Synthesis";
  myelination: OL_mature + MBP_protein => Myelin_sheath; myelination_efficiency*OL_mature*MBP_protein*(1 - 0.5*APAP_fetal); myelination is "Myelin Sheath Formation";
  intra_hemisphere_connectivity: Myelin_sheath => Intra_hemisphere_connectivity; Myelin_sheath*(1 + 0.8*T_effective); intra_hemisphere_connectivity is "Within-Hemisphere Connection Formation";
  inter_hemisphere_connectivity: Myelin_sheath => Inter_hemisphere_connectivity; Myelin_sheath*(1 - 0.6*T_effective); inter_hemisphere_connectivity is "Between-Hemisphere Connection Formation";
  testosterone_synthesis: -> Testosterone; 2.5; testosterone_synthesis is "Testosterone Synthesis";
  testosterone_degradation: Testosterone -> ; 0.01*Testosterone; testosterone_degradation is "Testosterone Degradation";
  testosterone_effectiveness: Testosterone -> T_effective; Testosterone*(1 - 0.4*(APAP_fetal/(APAP_fetal + 10))); testosterone_effectiveness is "Testosterone Effectiveness with APAP Interference";

  // Events:
  first_puberty_onset: at (gestational_week >= 12): critical_period_1 = 3.5; first_puberty_onset is "First Fetal Puberty (12-22 weeks)";
  first_puberty_end: at (gestational_week > 22): critical_period_1 = 1; first_puberty_end is "End First Fetal Puberty";
end
