// SBML level 3 version 2
// Acetaminophen-Autism Neurodevelopmental BioModel
// Multi-compartment, multi-timescale systems biology model

model acetaminophen_autism_model()
  // Acetaminophen-Induced Neurodevelopmental Disruption

  // Compartments:
  compartment maternal_plasma; maternal_plasma is "Maternal Plasma";
  compartment placenta; placenta is "Placental Tissue";
  compartment fetal_brain; fetal_brain is "Fetal Brain";
  compartment fetal_plasma; fetal_plasma is "Fetal Circulation";
  compartment oligodendrocyte; oligodendrocyte is "Oligodendrocyte Lineage";

  // Species:
  species APAP_maternal in maternal_plasma; APAP_maternal is "Acetaminophen_Maternal";
  species APAP_placenta in placenta; APAP_placenta is "Acetaminophen_Placental";
  species APAP_fetal in fetal_brain; APAP_fetal is "Acetaminophen_Fetal";
  species NAPQI in fetal_brain; NAPQI is "N_acetyl_p_benzoquinone_imine";
  species Testosterone in fetal_plasma;
  species LH in fetal_plasma; LH is "Luteinizing_Hormone";
  species FSH in fetal_plasma; FSH is "Follicle_Stimulating_Hormone";
  species T_effective in fetal_brain; T_effective is "Bioavailable_Testosterone";
  species AromataseComplex in placenta; AromataseComplex is "Aromatase_APAP_Complex";
  species CYP2E1 in fetal_brain; CYP2E1 is "Cytochrome_P450_2E1";
  species CYP2E1_APAP in fetal_brain; CYP2E1_APAP is "CYP2E1_APAP_Complex";
  species Folate in fetal_brain;
  species SAM in fetal_brain; SAM is "S_Adenosyl_Methionine";
  species ROS in fetal_brain; ROS is "Reactive_Oxygen_Species";
  species GSH in fetal_brain; GSH is "Glutathione";
  species GSSG in fetal_brain; GSSG is "Glutathione_Disulfide";
  species OPC in oligodendrocyte; OPC is "Oligodendrocyte_Precursor_Cells";
  species OL_immature in oligodendrocyte; OL_immature is "Immature_Oligodendrocytes";
  species OL_mature in oligodendrocyte; OL_mature is "Mature_Oligodendrocytes";
  species MBP_mRNA in oligodendrocyte; MBP_mRNA is "Myelin_Basic_Protein_mRNA";
  species MBP_protein in oligodendrocyte; MBP_protein is "Myelin_Basic_Protein";
  species Myelin_sheath in fetal_brain; Myelin_sheath is "Myelin_Sheath_Formation";
  species DNMT1 in fetal_brain; DNMT1 is "DNA_Methyltransferase_1";
  species MBP_promoter in oligodendrocyte; MBP_promoter is "MBP_Promoter_Unmethylated";
  species MBP_promoter_meth in oligodendrocyte; MBP_promoter_meth is "MBP_Promoter_Methylated";
  species Intra_hemisphere_connectivity in fetal_brain; Intra_hemisphere_connectivity is "Within_Hemisphere_Connections";
  species Inter_hemisphere_connectivity in fetal_brain; Inter_hemisphere_connectivity is "Between_Hemisphere_Connections";
  species Corpus_callosum_volume in fetal_brain; Corpus_callosum_volume is "Corpus_Callosum_Volume";
  species gestational_week in fetal_plasma = 0; gestational_week is "Gestational_Week";

  // Parameters:
  k_placental_transfer = 0.95;
  k_fetal_clearance = 0.1;
  k_cyp2e1_activity = 0.3;
  critical_period_1 = 1;
  critical_period_2 = 1;
  critical_period_3 = 1;
  T_baseline = 450;
  androgen_disruption_rate = 0.7;
  masculinization_threshold = 200;
  opc_proliferation_rate = 0.5;
  ol_differentiation_rate = 0.3;
  mbp_transcription_rate = 1;
  myelination_efficiency = 0.8;
  methylation_rate = 0.2;
  demethylation_rate = 0.05;
  sam_folate_ratio = 2;
  ros_generation_rate = 0.4;
  antioxidant_capacity = 1;
  oxidative_damage_threshold = 2;

  // Assignment rules:
  Testosterone := 30 + 420*exp(-((gestational_week - 17)^2/(2*3^2)));
  LH := 10 + 60*exp(-((gestational_week - 15)^2/18));
  FSH := 5 + 35*exp(-((gestational_week - 15)^2/20));
  T_effective := Testosterone*(1 - 0.4*(APAP_fetal/(APAP_fetal + 10))*critical_period_1);

  // Rate rules:
  gestational_week' = 1/168;

  // Reactions:
  placental_transfer: APAP_maternal -> APAP_fetal; k_placental_transfer*APAP_maternal; placental_transfer is "Maternal to Fetal APAP Transfer";
  cyp2e1_metabolism: APAP_fetal + CYP2E1 => NAPQI + CYP2E1; k_cyp2e1_activity*APAP_fetal*CYP2E1; cyp2e1_metabolism is "CYP2E1-Mediated APAP Metabolism";
  testosterone_disruption: Testosterone => T_effective; Testosterone*(1 - androgen_disruption_rate*APAP_fetal*critical_period_1); testosterone_disruption is "APAP-Mediated Testosterone Disruption";
  ros_generation: NAPQI => ROS; ros_generation_rate*NAPQI; ros_generation is "NAPQI-Induced ROS Generation";
  folate_consumption: Folate => ; 0.3*Folate*APAP_fetal; folate_consumption is "APAP-Mediated Folate Depletion";
  opc_proliferation: OPC => 2 OPC; opc_proliferation_rate*OPC*(1 + 0.5*Folate)*(1 - 0.6*ROS); opc_proliferation is "OPC Proliferation";
  ol_differentiation: OPC => OL_immature; ol_differentiation_rate*OPC*T_effective; ol_differentiation is "Oligodendrocyte Differentiation";
  mbp_methylation: MBP_promoter + SAM -> MBP_promoter_meth; methylation_rate*MBP_promoter*SAM*(1 + 2*APAP_fetal); mbp_methylation is "MBP Promoter Methylation";
  mbp_transcription: MBP_promoter => MBP_mRNA; mbp_transcription_rate*MBP_promoter*T_effective; mbp_transcription is "MBP mRNA Synthesis";
  mbp_translation: MBP_mRNA => MBP_protein; 0.8*MBP_mRNA; mbp_translation is "MBP Protein Synthesis";
  myelination: OL_mature + MBP_protein => Myelin_sheath; myelination_efficiency*OL_mature*MBP_protein*(1 - 0.5*APAP_fetal); myelination is "Myelin Sheath Formation";
  intra_hemisphere_connectivity: Myelin_sheath => Intra_hemisphere_connectivity; Myelin_sheath*(1 + 0.8*T_effective); intra_hemisphere_connectivity is "Within-Hemisphere Connection Formation";
  inter_hemisphere_connectivity: Myelin_sheath => Inter_hemisphere_connectivity; Myelin_sheath*(1 - 0.6*T_effective); inter_hemisphere_connectivity is "Between-Hemisphere Connection Formation";
  testosterone_synthesis: -> Testosterone; 2.5; testosterone_synthesis is "Testosterone Synthesis";
  testosterone_degradation: Testosterone -> ; 0.01*Testosterone; testosterone_degradation is "Testosterone Degradation";
  testosterone_effectiveness: Testosterone -> T_effective; Testosterone*(1 - 0.4*(APAP_fetal/(APAP_fetal + 10))); testosterone_effectiveness is "Testosterone Effectiveness with APAP Interference";

  // Events:
  first_puberty_onset: at (gestational_week >= 12): critical_period_1 = 3.5; first_puberty_onset is "First Fetal Puberty (12-22 weeks)";
  first_puberty_end: at (gestational_week > 22): critical_period_1 = 1; first_puberty_end is "End First Fetal Puberty";
end
